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/BATCH
/COM,ANSYS RELEASE Release 19.1      BUILD 19.1      UP20180418       17:10:53
/input,menust,tmp,''
/GST,ON
/PLO,INFO,3
/GRO,CURL,ON
/CPLANE,1
WPSTYLE,,,,,,,,0
/PREP7
ET,1,LINK180
MPTEMP,,,,,,,,
MPTEMP,1,0
MPDATA,EX,1,,2e6
MPDATA,PRXY,1,,
SECTYPE,1,LINK, ,area
SECDATA,1,
SECCONTROL,0,0
/RGB,INDEX,100,100,100, 0
/RGB,INDEX, 80, 80, 80,13
/RGB,INDEX, 60, 60, 60,14
/RGB,INDEX, 0, 0, 0,15
K,1,0,0,,
K, ,0,0,,
K, ,0,0,,
FINISH
/CLEAR,START
/COM,ANSYS RELEASE Release 19.1      BUILD 19.1      UP20180418       17:24:17
/input,start,ans,'C:\Program Files\ANSYS Inc\v191\ANSYS\apdl\'
/PREP7
ET,1,LINK180
MPTEMP,,,,,,,,
MPTEMP,1,0
MPDATA,EX,1,,2e6
MPDATA,PRXY,1,,
SECTYPE,1,LINK, ,area
SECDATA,1,
SECCONTROL,0,0
K, ,0,,,
K, ,50,50,,
K, ,100,0,,
K, ,200,100,,
LSTR,       1,       2
LSTR,       3,       2
LSTR,       2,       4
LSTR,       4,       3
TYPE,   1
MAT,       1
REAL,
ESYS,       0
SECNUM,   1
LESIZE,ALL, , ,1, ,1, , ,0,
FLST,2,4,4,ORDE,2
FITEM,2,1
FITEM,2,-4
LMESH,P51X
ELIST
NLIST
/NUMBER,0
FLST,2,2,1,ORDE,2
FITEM,2,1
FITEM,2,3
/GO
D,P51X, , , , , ,ALL, , , , ,
FLST,2,1,1,ORDE,1
FITEM,2,4
/GO
F,P51X,FY,-1000
FINISH
/SOL
/STATUS,SOLU
SOLVE
FINISH
/POST1
PLDISP,1
PLDISP,1
PRNSOL,U,COMP
AVPRIN,0, ,
ETABLE,memforce,SMISC, 1
AVPRIN,0, ,
ETABLE,astress,LS, 1
ETABLE,REFL
PRETAB,MEMFORCE,ASTRESS
SAVE
SAVE
SAVE
SAVE
SAVE
SAVE
SAVE
SAVE
SAVE
SAVE
SAVE
SAVE
SAVE
SAVE
SAVE
SAVE
SAVE
SAVE
SAVE
SAVE,'mj','db','C:\USERS\STUDENT\DESKTOP\'
FINISH
! /EXIT,ALL
